psi(mA) == m_1*mA + b_1
volts(sig) == sig*5/1024
1024/5 = 204.8
5/1024*V = 0.00488281 V
V == I*R
mA(volts) == volts/R_1*A
R_1 := 263.511*ohm
b_1 := -1.252746011 psi
m_1 := 0.312183186416*psi/mA
psig(sig) := m_1*(sig*5*V/1024/R_1) + b_1
psig(sig) := m_1*(sig*5*V/1024/R_1) + b_1
psig(21) = -1.13127 psi
cal_m := m_1*(0.0049/R_1*V) = 0.00580506 psi
psig2(sig) := sig*cal_m + b_1
g(sig) := psig2(sig) - psig(sig)
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cal_m = 0.00580506 psi
cal_m = 0.300208 torr
b_1 = -1.25275 psi
b_1 = -64.7857 torr
1 atm - 640.41 torr = 2.31248 psi
