# The following is a quick way to determine your T.boil based on the barometric pressure.
# Data are taken from DIPPR.
a := transpose([73.649, -7258.2, -7.3037, 4.1653e-6, 2])
Y_vp(T_1) := exp(a[0] + a[1]*K/T_1 + a[2]*ln(T_1/K) + a[3]*(T_1/K)^a[4])*Pa
T_guess := 373 K
Given
Y_vp(T_guess) == P_given
T_boil(P_given) := Find(T_guess)
P_input := 643.9 torr
T_output := T_boil(P_input)
T_output = 95.4342 °C
